var1 := 3
WRITEEXCEL("TestOutput.xlsx", variableName1, □, □, □)
force := 5.0 lbf
distance := 80.0 m
var12 := 1.25 m
var23 := 1.23 psi
var34 := 1.023 lbf
var45 := 15213.0 lbf
force := 5.0 lbf
distance := 80.0 m
var12 := 1.25 m
var23 := 1.23 psi
var34 := 1.023 lbf
var45 := 15213.0 lbf
mat1 := [1, 3; 2, 4]
mat2 := [5, 7; 6, 8]
force*distance =  # no stored result
excelVar1 =  # no stored result
excelVar1*force =  # no stored result
force*distance*var12*var23*var34*excelVar1 =  # no stored result
force*distance =  # no stored result
excelVar1 =  # no stored result
excelVar1*force =  # no stored result
force*distance*var12*var23*var34*excelVar1 =  # no stored result
excelVar1 := READEXCEL("C:\Users\rcarlson\Desktop\Programs\ChimneyProgramFULLReferences\RCPython\mcdx\mathcadExcel.xlsm", "B1:B100")
excelVar1 := READEXCEL("C:\Users\rcarlson\Desktop\Programs\ChimneyProgramFULLReferences\RCPython\mcdx\mathcadExcel.xlsm", "B1:B100")
excelVar1write := WRITEEXCEL("out.xlsx", "excelVar1", "A1")
