testvar1 := 1234*12/23^2
testvar1 = 27.9924
testvar2 := testvar1*23
testvar2 = 643.826
testvar3 := testvar2*testvar1/testvar1^1.5
testvar3 = 121.688
testvar4 := testvar2*testvar1/testvar3^2 = 1.21706
a := 5 in
b := 6 in
c := a*b = 0.208333 ft^2
a_test := 5
b_test2 := 6
